*Heading
** Job name: NDBR50 Model name: NDB_R50_xy_t074_mbw
** Generated by: Abaqus/CAE 2017
*Preprint, echo=NO, model=NO, history=NO, contact=NO
**
** PARTS
**
*Part, name=DogBone_Form1
*End Part
**
**
** ASSEMBLY
**
*Assembly, name=Assembly
**
*Instance, name=model, part=DogBone_Form1
*Node
      1,   5.46130562,          -6.,   0.74000001
      2,   5.46130562,          -6.,           0.
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*Element, type=C3D8R
    1,   313,  1003,  5167,  1819,     9,   249,  2839,  3942
    2,  1003,  1004,  5168,  5167,   249,   250,  2840,  2839
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*Nset, nset="Whole specimen", generate
     1,  31714,      1
*Elset, elset="Whole specimen", generate
     1,  26922,      1
*Orientation, name=Ori-1
1., 0., 0., 0., 1., 0.
3, 90.
** Section: Section-1
*Solid Section, elset="Whole specimen", orientation=Ori-1, material=DP1000
,
*End Instance
**
*Elset, elset=Cr-element_1, instance=model
 5664,
*Elset, elset=Cr-element_2, instance=model
 5874,
*Elset, elset=Cr-element_3, instance=model
 17010,
*Elset, elset=Cr-element_4, instance=model
 17220,
*Nset, nset=Disp, instance=model
 30471, 30479, 30487, 30491, 30496, 30505
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*Elset, elset=Disp, instance=model
 26247, 26248, 26249, 26250, 26251, 26252
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*Nset, nset=Force, instance=model
 30471, 30479, 30487, 30491, 30496, 30505
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*Elset, elset=Force, instance=model
 26247, 26248, 26249, 26250, 26251, 26252
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*Nset, nset=y_fix, instance=model
 31128, 31142, 31146, 31149, 31154, 31166
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*Elset, elset=y_fix, instance=model
 26728, 26729, 26730, 26731, 26732, 26733
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*Nset, nset=z-sym, instance=model
     2,     3,     5,     6,     9,    12
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*Elset, elset=z-sym, instance=model
     1,     8,    15,    22,    29,    36
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*End Assembly
*Amplitude, name=Amp-1
             0.,              0.,            0.01,              1.
**
** MATERIALS
**
*Material, name=DP1000
*Elastic
210000., 0.3
*Plastic
867.3603862, 	0.00
927.8191952, 	0.01
976.8493572, 	0.02
1006.213754, 	0.03
1027.920088, 	0.04
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1463.055026, 	3.00
*Density
 7.85e-09,
**
** BOUNDARY CONDITIONS
**
** Name: Top_Fix Type: Displacement/Rotation
*Boundary
Disp, 4, 4
Disp, 5, 5
Disp, 6, 6
** Name: y-fix Type: Symmetry/Antisymmetry/Encastre
*Boundary
y_fix, ENCASTRE
** Name: z-Symmetrie Type: Symmetry/Antisymmetry/Encastre
*Boundary
z-sym, ZSYMM
** ----------------------------------------------------------------
**
** STEP: Move
**
*Step, name=Move, nlgeom=YES
*Dynamic, Explicit
, 0.01
*Bulk Viscosity
0.06, 1.2
**
** BOUNDARY CONDITIONS
**
** Name: Move Type: Displacement/Rotation
*Boundary, amplitude=Amp-1
Disp, 2, 2, 3.0
**
** OUTPUT REQUESTS
**
*Restart, write, number interval=1, time marks=NO
**
** FIELD OUTPUT: F-Output-1
**
*Output, field, number interval=100
*Node Output
RF, U
*Element Output, directions=YES
E, S, PEEQ, STATUS
**
** HISTORY OUTPUT: H-Output-1
**
*Output, history, variable=PRESELECT
*End Step
